# Определение модуля зацепления:
K_m := 1.4  # - коэф. типа профиля зуба, для прямозубых колес
# Y_F | - коэф. формы зуба
K_β := 1  # - коэф. неравномерности нагрузки по ширине колеса 1..1.3
ψ_bm
# - коэф. ширины зубчатого венца 3..16
ψ_bmк := 14
ψ_bmш := 16
[σ_F]  # - допуск. напряжение изгиба МПа
# __________________________________________________________________________
# Сталь 35 - колесо | Сталь 45 - шестерня
# Коэф. лин. расшир.
#
# Плотность
#
# Предел прочности
#
# Предел выносливости
#
# Твердость HB
#
# Термообработка
α := 10.6 .. 12.4*10^-6
1/C
ρ := 7850  # кг/м^3
σ_вк := 520
σ_вш := 580  # МПа
σ_1к := 250
σ_1ш := 280  # МПа
196 .. 263
190 .. 240
# Нормализация, закалка, отпуск
# __________________________________________________________________________
n_зп := 1.5  # - коэф. запаса прочности 1.5..2.0
421/1.5 = 280.667
σ_Fк := 281
280/1.5 = 186.667
σ_Fш := 187
M_IV := 22
M_III := 2.82
M_II := 0.3615
M_I := 0.0463
Y_Fк56 := 3.73
Y_Fш56 := 4.15
Y_Fк56/σ_Fк = 0.013274
Y_Fш56/σ_Fш = 0.0221925
z_6 := 18
m_р56 := K_m*nthroot(M_IV*10^3*K_β*Y_Fк56/(z_6*ψ_bmк*σ_Fк), 3) = 1.47052  # мм
m_р56 := K_m*nthroot(M_IV*10^3*K_β*Y_Fш56/(z_6*ψ_bmш*σ_Fш), 3) = 1.66932  # мм
Y_Fк34 := 3.73
Y_Fш34 := 4.15
Y_Fк34/σ_Fк = 0.013274
Y_Fш34/σ_Fш = 0.0221925
z_4 := 54
m_р34 := K_m*nthroot(M_IV*10^3*K_β*Y_Fк34/(z_4*ψ_bmк*σ_Fк), 3) = 1.0196  # мм
Y_Fк12 := 3.73
Y_Fш12 := 4.15
Y_Fк12/σ_Fк = 0.013274
Y_Fш12/σ_Fш = 0.0221925
z_2 := 126
m_р12 := K_m*nthroot(M_IV*10^3*K_β*Y_Fк12/(z_2*ψ_bmк*σ_Fк), 3) = 0.768724  # мм
m_56 := 1.5
m_34 := 1.5
m_12 := 1.5
# Геометрический расчет кинематики
# d_f | - диаметр впадин
# d | - делительный диаметр
# b_2 | - ширина колеса
# d_a | - диаметр вершин зубьев
# a | - делительное межосевое расст.
# с* - коэф. радиал. зазора, = 0.5 и 0.35 при m <= 0.5  и  > 0.5 соотв.
z_1 := 18
m_12 = 1.5
d_1 := m_12*z_1 = 27
d_a1 := m_12*(z_1 + 2) = 30
d_f1 := m_12*(z_1 - 2*(1 + 0.35)) = 22.95
b_1 := ψ_bmш*m_12 = 24
b'_1 := 6
z_2 := 54
m_12 = 1.5
d_2 := m_12*z_2 = 81
d_a2 := m_12*(z_2 + 2) = 84
d_f2 := m_12*(z_2 - 2*(1 + 0.35)) = 76.95
b_2 := ψ_bmк*m_12 = 21
a_12 := m_12*(z_1 + z_2)/2 = 54
z_4 := 126
m_34 = 1.5
d_4 := m_34*z_4 = 189
d_a4 := m_34*(2 + z_4) = 192
d_f4 := m_34*(z_4 - 2*(1 + 0.35)) = 184.95
b_4 := ψ_bmк*m_34 = 21
a_34 := m_34*(z_2 + z_4)/2 = 135
